# Compression using walls

units		metal
boundary	f f f
atom_style	atomic

# Time steps
# Total time steps
variable	Ntot equal 2000
# Dump file interval
variable	N1 equal ${Ntot}/10
#variable	N1 equal 10
# Stress calc interval
variable	N2 equal ${Ntot}/100
#variable	N2 equal 10
# Thermo Info interval
variable	N3 equal ${Ntot}/100
#variable	N3 equal 1000
# Prescribed temperature (K)
variable	Tset equal 300.0
# Prescribed pressure (bars)
variable	Pset equal 1.0
# For example, 5 GPa
#variable	Pset equal 50000.0

read_data	sic.lmp
#read_restart	restart.data
#reset_timestep	0

# Setup potential
# SiC
#pair_style      vashishta
pair_style      vashishta/table 100000 0.2
pair_coeff      * * ../potentials/SiC.vashishta Si C

neighbor        1.0 bin
neigh_modify    every 1 delay 5 check yes

timestep	1.0e-3
velocity	all create ${Tset} 376847 loop geom

# Choose ensemble
# NEV ensemble
fix		1 all nve
#    using velocity scaling method
fix             2 all temp/rescale 1 ${Tset} ${Tset} 1.0 1.0
# NVT ensemble
#fix		1 all nvt temp ${Tset} ${Tset} $(100.0*dt)
# NPT ensemble
#fix		1 all npt temp ${Tset} ${Tset} $(100.0*dt) iso ${Pset} ${Pset} $(1000.0*dt)
# Walls
# velocity unit = Angstroms/picosecond = 100 m/s
variable	velz equal 10.0
variable	ts equal step
variable	delta equal dt
variable	z1 equal zlo
variable	z2 equal zhi
variable	z1w equal "v_z1 + v_velz * v_ts * v_delta"
variable	z2w equal "v_z2 - v_velz * v_ts * v_delta"
variable	zlen equal "v_z2w - v_z1w"
#print "z2w = ${z2w}"
#print "z1w = ${z1w}"
fix		3 all wall/reflect zlo v_z1w zhi v_z2w units box

# Stress tensor
compute         st all pressure thermo_temp
# Time average
#fix             myst all ave/time 1 ${N2} ${N2} c_st[1] c_st[2] c_st[3] c_st[4] c_st[5] c_st[6] v_zlen file stress.d
# No time average
fix             myst all ave/time 1 1 ${N2} c_st[1] c_st[2] c_st[3] c_st[4] c_st[5] c_st[6] v_zlen file stress.d
# Per-atom stress tensor
#compute		pst all stress/atom thermo_temp

thermo		${N3}
thermo_style	custom step temp press vol pe ke etotal

dump		2 all atom ${N1} dump.*.atom
#dump		2 all custom ${N1} dump.*.stress x y z c_pst[3]

run		${Ntot}
#write_restart	restart.data
